New "RegControl.creg1a" transformer=reg1a winding=2 vreg=120 band=2 ptratio=20 CTprim=700 R=3.0 X=7.5 tapwinding=2 RemotePTRatio=20 TapNum=6.0
New "RegControl.creg2a" transformer=reg2a winding=2 vreg=120 band=2 ptratio=20 CTprim=50 R=0.4 X=0.4 tapwinding=2 RemotePTRatio=20
New "RegControl.creg3a" transformer=reg3a winding=2 vreg=120 band=1 ptratio=20 CTprim=50 R=0.4 X=0.4 tapwinding=2 RemotePTRatio=20 TapNum=2.0
New "RegControl.creg3c" transformer=reg3c winding=2 vreg=120 band=1 ptratio=20 CTprim=50 R=0.4 X=0.4 tapwinding=2 RemotePTRatio=20
New "RegControl.creg4a" transformer=reg4a winding=2 vreg=124 band=2 ptratio=20 CTprim=300 R=0.6 X=1.3 tapwinding=2 RemotePTRatio=20 TapNum=10.0
New "RegControl.creg4b" transformer=reg4b winding=2 vreg=124 band=2 ptratio=20 CTprim=300 R=1.4 X=2.6 tapwinding=2 RemotePTRatio=20 TapNum=4.0
New "RegControl.creg4c" transformer=reg4c winding=2 vreg=124 band=2 ptratio=20 CTprim=300 R=0.2 X=1.4 tapwinding=2 RemotePTRatio=20 TapNum=6.0
